# Салдин Вячеслав | Вариант 4
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Z_H := 1  # - атомный номер иона
M_H := 1.00794*g/mol  # - относительная атомная масса иона
m_0 := 0.00055*g/mol  # - масса электрона
q := 1.6*10^-19*C
K_c := 9*10^9*m/F
eV := 1.6*10^-19*C*V
# Часть 1
# Для определения сечения торможения нужно знать порядковый номер и энергию ионизации атомов мишения.
Z_Si := 31
Z_Sn := 50
Z_O := 8
I_Si := 10*Z_Si*eV = 310 eV
I_Sn := 10*Z_Sn*eV = 500 eV
I_O := 10*Z_O*eV = 80 eV
ε_Si(E) := (K_c^2*2*π*Z_H^2*q^4/E*Z_Si*M_H/m_0)*ln(4*m_0*E/(M_H*I_Si))
ε_Sn(E) := (K_c^2*2*π*Z_H^2*q^4/E*Z_Sn*M_H/m_0)*ln(4*m_0*E/(M_H*I_Sn))
ε_O(E) := (K_c^2*2*π*Z_H^2*q^4/E*Z_O*M_H/m_0)*ln(4*m_0*E/(M_H*I_O))
# При торможении в материале сложного состава сечение торможения складывается из сечений торможения от каждого рода атомов с весом, равным относительному содержанию элементов.
ε_SiO2(E) := ε_Si(E) + 2*ε_O(E)
ε_SnO2(E) := ε_Sn(E) + 2*ε_O(E)
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# Часть 2
# Слой металла
# Pt - используемый металл
t := 150*10^-7*cm  # - толщина пленки SnO2
Z_Pt := 78
M_Pt := 195*g/mol
I := 10*10^-6*A  # - ток пучка ионов
tt := 30*s  # - длительность бомбардировки
θ := 170*deg  # - угол рассеяния
A := 0.1*cm^2  # - площадь приемного окна детектора
L := 5*cm  # - расстояния до детектора
E_0 := 2.5*10^6*eV  # - энергия налетающего иона
# Рассчитаем телесный угол захвата детектора и количество частиц в пучке ионов
Ω := A/L^2 = 0.004 sr
Q := I*tt/q = 1.875e15
# Определим концентрацию атомов в мишени
N_A := 6.022*10^23*1/mol  # - число Авогадро
ρ_Pt := 8.902*g/cm^3  # - плотность мишени
N_Pt := N_A/M_Pt*ρ_Pt = 2.74912e22 1/cm^3
# По формуле Резерфорда можно посчитать дифференциальное сечение рассеяния к телесному углу.
# Поскольку исследуется тонкий приповерхностный слой (менее 0.5 мкм толщиной), то энергия выходы будет приблезительно равна произведению начальной энергии на кинематический фактор мишени.
K_Pt := ((cos(θ) + sqrt(|(M_Pt/M_H)^2 - sin(θ)^2|))/(1 + M_Pt/M_H))^2 = 0.97969
# Перед знаком корня использован знак "+", поскольку подкоренное выражение положительно.
E_Pt := E_0*K_Pt = 2449226 eV
dσ_dΩ.Pt := K_c^2*(Z_H*Z_Pt*q^2/(4*E_Pt))^2*1/sin(θ/2)^4 = 1.33463 barn/sr  # - формула Резерфорда
# Рассчитаем выход рассеяния.
Y_Pt := dσ_dΩ.Pt*Ω*Q*N_Pt^(2/3) = 9117.66
δE_d := 20*10^3*eV  # - разрешение детектора
# Не имея данных о толщине пленки металла, рассчитать разрешение страгглинга нельзя, поэтому примем предел разрешения равным разрешению детектора.
δE := δE_d
# Зная выход рассеяния и предел разрешения, сможем посчитать высоту спектра
d_n := 5*10^3*eV  # - ширина канала
H_Pt := Y_Pt/sqrt(2*π*(δE/d_n)^2)*e^((E_0 - E_Pt)^2/(2*δE^2)) = 22817.4
# Тонккая пленка
# Определим концентрацию атомов в мишени
ρ_Sn := 7.31*g/cm^3  # - плотность мишени
N_A := 6.022*10^23*1/mol  # - число Авогадро
M_Sn := 118.6*g/mol
N_Sn := N_A/M_Sn*ρ_Sn = 3.7117e22 1/cm^3
ρ_O := 0.00142897*g/cm^3  # - плотность мишени (кислород)
M_O := 15.9994*g/mol
N_O := N_A/M_O*ρ_O = 5.37849e19 1/cm^3
K_Sn := ((cos(θ) + sqrt(|(M_Sn/M_H)^2 - sin(θ)^2|))/(1 + M_Sn/M_H))^2 = 0.966826
# Перед знаком корня использован знак "+", поскольку подкоренное выражение положительно.
E_Sn := E_0*K_Sn = 2417064 eV
dσ_dΩ.Sn := K_c^2*(Z_H*Z_Sn*q^2/(4*E_Sn))^2*1/sin(θ/2)^4 = 0.563108 barn/sr  # - формула Резерфорда
Y_Sn := dσ_dΩ.Sn*Ω*Q*N_Sn^(2/3) = 4699.32
K_O := ((cos(θ) + sqrt(|(M_O/M_H)^2 - sin(θ)^2|))/(1 + M_O/M_H))^2 = 0.778478
# Перед знаком корня использован знак "+", поскольку подкоренное выражение положительно.
E_O := E_0*K_O = 1946195 eV
# Поскольку атом кислородаотносительно легкий, для него в формулу Резерфорда нужно внести поправку.
dσ_dΩ.O := K_c^2*(Z_H*Z_O*q^2/(4*E_O))^2*4/sin(θ)^4*(sqrt(1 - (M_H/M_O*sin(θ))^2) + cos(θ))^2/sqrt(1 - (M_H/M_O*sin(θ))^2) = 0.0220614 barn/sr
Y_O := dσ_dΩ.O*Ω*Q*N_O^(2/3) = 2.35759
# Посчитаем разрешение страгглинга с примененнием формулы Бора для двух компонентов пленки.
δE_s := 2.35*sqrt(4*π*K_c^2*Z_H^2*q^4*N_Sn*Z_Sn*t)
δE_s = 6329.26 eV
δE_Sn := sqrt(δE_s^2 + δE_d^2) = 20977.6 eV
δE_s := 2.35*sqrt(4*π*K_c^2*Z_H^2*q^4*N_O*Z_O*t)
δE_s = 96.3731 eV
δE_O := δE_d
# В обоих случаях значения разрешения страгглинга и разрешения детектора отличаются в пару десятков порядков, поэтому предел разрешения по энергии будет определяться только разрешением детектора.
ang := 10^-10*m
H_Sn := Y_Sn/sqrt(2*π*(δE/d_n)^2)*e^((E_Pt - E_Sn)^2/(2*δE_Sn^2)) = 1518.1
H_O := Y_O/sqrt(2*π*(δE_O/d_n)^2)*e^((E_Pt - E_Sn)^2/(2*δE^2)) = 0.85674
# Определим значение коэффициента энергетических потерь при обратном рассеянии.
S_Sn := K_Sn*ε_Sn(E_Pt)*N_Sn + 1/|cos(θ)|*(K_Sn*ε_Sn(K_Sn*E_0)*N_Sn) = 8.3855 eV/ang
ΔE_Sn := t*S_Sn = 12578.2 eV
S_O := K_O*ε_O(E_0)*N_O + 1/|cos(θ)|*(K_O*ε_O(K_O*E_0)*N_O) = 0.00300839 eV/ang
ΔE_O := t*S_O = 4.51258 eV
En0 := 0.1*10^6*eV  # - энергия нулевого канала
n_Pt := ceil((E_Pt - En0)/d_n) = 470
μ := n_Pt = 470
σ := δE/d_n = 4
f_Gauss(n) := 1/(σ*sqrt(2*π))*e^(-1/2*((n - μ)/σ)^2)
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n_f := ceil(((E_Pt + ΔE_Sn) - En0)/d_n) = 473
Ehalf_Sn := E_Pt + ΔE_Sn/2 = 2455515 eV
Yhalf_Sn := K_c^2*(Z_H*Z_Sn*q^2/(4*Ehalf_Sn))^2*1/sin(θ/2)^4*Ω*Q*N_Sn^(2/3) = 4553.3
n_half_Sn := n_Pt + ((n_f - n_Pt)/2) = 471.5
Y_n(n, n_Pt, n_f, Yhalf_Sn) :=
    n05 ← n_Pt + ((n_f - n_Pt)/2)
    Y_n ← Yhalf_Sn*(n05/n)^2 if n_Pt < n < n_f
    Y_n ← 0 otherwise
    Y_n
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# Подложка
# Определим концентрацию атомов в мишени
ρ_Si := 2.33*g/cm^3  # - плотность мишени
N_A := 6.022*10^23*1/mol  # - число Авогадро
M_Si := 28.085*g/mol
N_Si := N_A/M_Si*ρ_Si = 4.996e22 1/cm^3
ρ_O := 0.00142897*g/cm^3  # - плотность мишени (кислород)
M_O := 15.9994*g/mol
N_O := N_A/M_O*ρ_O = 5.37849e19 1/cm^3
K_Si := ((cos(θ) + sqrt(|(M_Si/M_H)^2 - sin(θ)^2|))/(1 + M_Si/M_H))^2 = 0.867164
# Перед знаком корня использован знак "+", поскольку подкоренное выражение положительно.
E_Si := E_0*K_Si = 2167911 eV
dσ_dΩ.Si := K_c^2*(Z_H*Z_Si*q^2/(4*E_Si))^2*1/sin(θ/2)^4 = 0.269072 barn/sr  # - формула Резерфорда
Y_Si := dσ_dΩ.Si*Ω*Q*N_Si^(2/3) = 2737.44
K_O := ((cos(θ) + sqrt(|(M_O/M_H)^2 - sin(θ)^2|))/(1 + M_O/M_H))^2 = 0.778478
# Перед знаком корня использован знак "+", поскольку подкоренное выражение положительно.
E_O := E_0*K_O = 1946195 eV
# Поскольку атом кислородаотносительно легкий, для него в формулу Резерфорда нужно внести поправку.
dσ_dΩ.O := K_c^2*(Z_H*Z_O*q^2/(4*E_O))^2*4/sin(θ)^4*(sqrt(1 - (M_H/M_O*sin(θ))^2) + cos(θ))^2/sqrt(1 - (M_H/M_O*sin(θ))^2) = 0.0220614 barn/sr
Y_O := dσ_dΩ.O*Ω*Q*N_O^(2/3) = 2.35759
# Толщина подложки нам не известна,поэтому разрешение страгглинга посчитать при данных условиях нельзя.
ang := 10^-10*m
H_Si := Y_Si/sqrt(2*π*(δE/d_n)^2)*e^((E_Pt - E_Si)^2/(2*δE^2)) = 2.49887e45
H_O := Y_O/sqrt(2*π*(δE_O/d_n)^2)*e^((E_Pt - E_Sn)^2/(2*δE^2)) = 0.85674
# Определим значение коэффициента энергетических потерь при обратном рассеянии.
S_Si := K_Si*ε_Si(E_Si)*N_Si + 1/|cos(θ)|*(K_Si*ε_Si(K_Si*E_0)*N_Si) = 8.12518 eV/ang
ΔE_Si := t*S_Si = 12187.8 eV
S_O := K_O*ε_O(E_0)*N_O + 1/|cos(θ)|*(K_O*ε_O(K_O*E_0)*N_O) = 0.00300839 eV/ang
ΔE_O := t*S_O = 4.51258 eV
nsO := ceil((E_O - En0)/d_n) = 370
nfO := ceil(((E_Pt + ΔE_O) - En0)/d_n) = 470
Ehalf_O := E_Pt + ΔE_O/2 = 2449228 eV
Yhalf_O := K_c^2*(Z_H*Z_O*q^2/(4*Ehalf_O))^2*1/sin(θ/2)^4*Ω*Q*N_O^(2/3) = 1.50032
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E_SiO := E_Si*K_O = 1687671 eV
E_OSn := E_O*K_Sn = 1881631 eV
E_SiSn := E_Si*K_Sn = 2095991 eV
E_OO := E_O*K_O = 1515070 eV
dσ_dΩ.SiO := K_c^2*(Z_H*Z_Si*q^2/(4*E_SiO))^2*1/sin(θ/2)^4 = 0.443993 barn/sr
dσ_dΩ.SiSn := K_c^2*(Z_H*Z_Si*q^2/(4*E_SiSn))^2*1/sin(θ/2)^4 = 0.287854 barn/sr
dσ_dΩ.OSn := K_c^2*(Z_H*Z_O*q^2/(4*E_OSn))^2*1/sin(θ/2)^4*(sqrt(1 - ((M_H/M_O)^2*sin(θ))^2) + cos(θ))/sqrt(1 - ((M_H/M_O)^2*sin(θ)^2)^2) = 0.000361372 barn/sr
dσ_dΩ.OO := K_c^2*(Z_H*Z_O*q^2/(4*E_OO))^2*1/sin(θ/2)^4*(sqrt(1 - ((M_H/M_O)^2*sin(θ))^2) + cos(θ))/sqrt(1 - ((M_H/M_O)^2*sin(θ)^2)^2) = 0.000557388 barn/sr
Y_SiO := dσ_dΩ.SiO*Ω*Q*N_Si^(2/3) = 4517.02
Y_SiSn := dσ_dΩ.SiSn*Ω*Q*N_Si^(2/3) = 2928.52
Y_OSn := dσ_dΩ.OSn*Ω*Q*N_O^(2/3) = 0.0386179
Y_OO := dσ_dΩ.OO*Ω*Q*N_O^(2/3) = 0.0595652
nfSiO := ceil((E_SiO - En0)/d_n) = 318
EcpSiO := (E_SiO - En0)/2 = 793836 eV
nfSiSn := ceil((E_SiSn - En0)/d_n) = 400
EcpSiSn := (E_SiSn - En0)/2 = 997996 eV
EcpOSn := (E_OSn - En0)/2 = 890816 eV
nfOSn := ceil((E_OSn - En0)/d_n) = 357
EcpOO := (E_OO - En0)/2 = 707535 eV
nfOO := ceil((E_OO - En0)/d_n) = 284
Y05_SiO := K_c^2*(Z_H*Z_Si*q^2/(4*EcpSiO))^2*1/sin(θ/2)^4*Ω*Q*N_Si^(2/3) = 20415.8
Y05_SiSn := K_c^2*(Z_H*Z_Si*q^2/(4*EcpSiSn))^2*1/sin(θ/2)^4*Ω*Q*N_Si^(2/3) = 12917.3
Y05_OSn := K_c^2*(Z_H*Z_O*q^2/(4*EcpOSn))^2*1/sin(θ/2)^4*(sqrt(1 - ((M_H/M_O)^2*sin(θ))^2) + cos(θ))/sqrt(1 - ((M_H/M_O)^2*sin(θ)^2)^2)*Ω*Q*N_O^(2/3) = 0.172299
Y05_OO := K_c^2*(Z_H*Z_O*q^2/(4*EcpOO))^2*1/sin(θ/2)^4*(sqrt(1 - ((M_H/M_O)^2*sin(θ))^2) + cos(θ))/sqrt(1 - ((M_H/M_O)^2*sin(θ)^2)^2)*Ω*Q*N_O^(2/3) = 0.273125
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YY(n) := f_Gauss(n) + Y_n(n, 0, nfSiO, Y05_SiO) + Y_n(n, 0, nfSiSn, Y05_SiSn) + Y_n(n, 0, nfOSn, Y05_OSn) + Y_n(n, 0, nfOO, Y05_OO) + Y_n(n, nsO, nfO, Yhalf_O) + Y_n(n, n_Pt, n_f, Yhalf_Sn)
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