# Маринин Никита Вариант 8
m_0 := 9.1*10^-31
m_He := 4*(1.66*10^-27)
E_0 := 5*10^5  # J
I_O := 10*8
ln(4*m_0*E_0/(m_He*I_O)) = 1.23145
Z_He := 2  # атомный номер иона
I_Si := 10*14
ln(4*m_0*E_0/(m_He*I_Si)) = 0.671837
M_He := 4.002602*g/mol  # относительная атомная масса иона
I_Pb := 10*82
ln(4*m_0*E_0/(m_He*I_Pb)) = -1.09582
m_0 := 0.00055*g/mol  # масса электрона
q := 1.6*10^-19*C
K_c := 9*10^9*m/F
eV := 1.6*10^-19*C*V
# Первый пункт
# 1.Построить кривые зависимости сечения торможения от энергии иона для каждого из элементов плёнки и подложки, а также для материала само  плёнки и подложки на одном графике в диапазоне энергий от 0.5 МэВ до 3 МэВ.
# Для определения сечения торможения нужно знать порядковый номер и энергию ионизации атомов мишения.
Z_Ga := 31
Z_V := 23
Z_O := 8
I_Ga := 12*Z_Ga*eV = 372 eV
I_V := 12*Z_V*eV = 276 eV
I_O := 12*Z_O*eV = 96 eV
atom := 10^15
ε_Ga(E) := (K_c^2*2*π*Z_He^2*q^4/(E*eV)*Z_Ga*M_He/m_0)*ln(4*m_0*E*eV/(M_He*I_Ga))
ε_V(E) := (K_c^2*2*π*Z_He^2*q^4/(E*eV)*Z_V*M_He/m_0)*ln(4*m_0*E*eV/(M_He*I_V))
ε_O(E) := (K_c^2*2*π*Z_He^2*q^4/(E*eV)*Z_O*M_He/m_0)*ln(4*m_0*E*eV/(M_He*I_O))
# При торможении в материале сложного состава сечение торможения складывается из сечений торможения от каждого рода атомов с весом, равным относительному содержанию элементов.
ε_Ga2O3(E) := 2*ε_Ga(E) + 3*ε_O(E)
ε_VO2(E) := ε_V(E) + 2*ε_O(E)
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# Второй Пункт
# 2. Построить спектр обратного рассеяния.
# Слой металла
# In - используемый металл
t := 250*10^-7*cm  # - толщина пленки VO2
Z_In := 49
M_In := 114.8*g/mol
I := 10*10^-6*A  # - ток пучка ионов
tt := 30*s  # - длительность бомбардировки
θ := 170*deg  # - угол рассеяния
A := 0.1*cm^2  # - площадь приемного окна детектора
L := 5*cm  # - расстояния до детектора
E_0 := 2.5*10^6*eV  # - энергия налетающего иона
# Расчёт телесного угола захвата детектора и количество частиц в пучке ионов.
Ω := A/L^2 = 0.004 sr
Q := I*tt/q = 1.875e15
# Определение концентрации атомов в мишени
N_A := 6.022*10^23*1/mol  # - число Авогадро
ρ_In := 8.902*g/cm^3  # - плотность мишени
N_In := N_A/M_In*ρ_In = 4.66967e22 1/cm^3
# По формуле Резерфорда расчитаем диффиренциальное сечение рассеяния
# Так как исследуемый слой считается тонким(менее 0.5 мкм), то энергию выхода можно посчитать как произведение начальной энергии на кинематический фактор
K_In := ((cos(θ) + sqrt(|(M_In/M_He)^2 - sin(θ)^2|))/(1 + M_In/M_He))^2 = 0.870698
E_In := E_0*K_In = 2176744 eV
dσ_dΩ.In := K_c^2*(Z_He*Z_In*q^2/(4*E_In))^2*1/sin(θ/2)^4 = 2.66726 barn/sr  # - формула Резерфорда
# Рассчитаем выход рассеяния.
Y_In := dσ_dΩ.In*Ω*Q*N_In^(2/3) = 25940.9
δE_d := 20*10^3*eV  # - разрешение детектора
# Не имея данных о толщине пленки металла, рассчитать разрешение страгглинга нельзя, поэтому примем предел разрешения равным разрешению детектора.
δE := δE_d
# Зная выход рассеяния и предел разрешения, сможем посчитать высоту спектра
d_n := 5*10^3*eV  # - ширина канала
H_In := Y_In/sqrt(2*π*(δE/d_n)^2)*e^((E_0 - E_In)^2/(2*δE^2)) = 1.37914e60
# Тонккая пленка
# Определим концентрацию атомов в мишени
M_V := 50.942*g/mol
# annotation to a formula above: Tip_v2
ρ_VO2 := 3.99*g/cm^3  # - плотность мишени
N_A := 6.022*10^23*1/mol  # - число Авогадро
M_VO2 := 101.96*g/mol  # молярная масса алюминия
N_VO2 := N_A/M_VO2*ρ_VO2 = 2.35659e22 1/cm^3
N_V := 2/5*N_VO2 = 9.42636e21 cm^-3
N_O := 3/5*N_VO2 = 1.41395e22 cm^-3
ρ_O := 0.00142897*g/cm^3  # - плотность мишени (кислород)
M_O := 15.9994*g/mol
(M_V/M_He)^2 - sin(θ)^2 = 161.952
K_V := ((cos(θ) + sqrt(|(M_V/M_He)^2 - sin(θ)^2|))/(1 + M_V/M_He))^2 = 0.73158
E_V := E_0*K_V = 1828950 eV
Z_He*Z_V*q^2/(4*E_V) = 1.00604e-24 F
dσ_dΩ.V := K_c^2*(Z_He*Z_V*q^2/(4*E_V))^2*1/sin(θ/2)^4 = 0.832415 barn/sr  # - формула Резерфорда
Y_V := dσ_dΩ.V*Ω*Q*N_V^(2/3) = 2785.89
(M_O/M_He)^2 - sin(θ)^2 = 15.9479
K_O := ((cos(θ) + sqrt(|(M_O/M_He)^2 - sin(θ)^2|))/(1 + M_O/M_He))^2 = 0.362482
E_O := E_0*K_O = 906205 eV
# Поскольку атом кислорода относительно легкий, для него в формулу Резерфорда нужно внести поправку.
dσ_dΩ.O := K_c^2*(Z_He*Z_O*q^2/(4*E_O))^2*4/sin(θ)^4*(sqrt(1 - (M_He/M_O*sin(θ))^2) + cos(θ))^2/sqrt(1 - (M_He/M_O*sin(θ))^2) = 0.361161 barn/sr
Y_O := dσ_dΩ.O*Ω*Q*N_O^(2/3) = 1583.87
# Посчитаем разрешение страгглинга с примененнием формулы Бора для двух компонентов пленки.
δE_s := 2.35*sqrt(4*π*K_c^2*Z_He^2*q^4*N_V*Z_V*t) = 5585.62 eV
δE_s = 5585.62 eV
δE_V := sqrt(δE_s^2 + δE_d^2) = 20765.3 eV
δE_s := 2.35*sqrt(4*π*K_c^2*Z_He^2*q^4*N_O*Z_O*t) = 4034.58 eV
δE_s = 4034.58 eV
δE_O := δE_d
# Определим значение коэффициента энергетических потерь при обратном рассеянии.
S_V := K_V*ε_V(E_In/eV)*N_V + 1/|cos(θ)|*(K_V*ε_V(K_V*E_0/eV)*N_V) = 8.37042 eV/Angstrom
ΔE_V := t*S_V = 20926.1 eV
S_O := K_O*ε_O(E_0/eV)*N_O + 1/|cos(θ)|*(K_O*ε_O(K_O*E_0/eV)*N_O) = 4.52431 eV/Angstrom
ΔE_O := t*S_O = 11310.8 eV
# *********************************************************************************************************************
En0 := 0.1*10^6*eV  # - энергия нулевого канала
n_In := ceil((E_In - En0)/d_n) = 416
μ := n_In = 416
σ := δE/d_n = 4
n_f := ceil(((E_In + ΔE_V) - En0)/d_n) = 420
EhVf_Al := E_In + ΔE_V/2 = 2187207 eV
YhVf_Al := K_c^2*(Z_He*Z_V*q^2/(4*EhVf_Al))^2*1/sin(θ/2)^4*Ω*Q*N_V^(2/3) = 1948
n_hVf_Al := n_In + ((n_f - n_In)/2) = 418
Y_n(n, n_In, n_f, YhVf_Al) :=
    n05 ← n_In + ((n_f - n_In)/2)
    Y_n ← YhVf_Al*(n05/n)^2 if n_In < n < n_f
    Y_n ← 0 otherwise
    Y_n
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# Подложка
# Определим концентрацию атомов в мишени
ρ_Ga2O3 := 6.44*g/cm^3  # - плотность мишени
N_A := 6.022*10^23*1/mol  # - число Авогадро
M_Ga2O3 := 187.444*g/mol
N_Ga2O3 := N_A/M_Ga2O3*ρ_Ga2O3 = 2.06897e22 1/cm^3
M_Ga := 69.723*g/mol
N_O := 3/5*N_Ga2O3 = 1.24138e22 cm^-3
N_Ga := 2/5*N_Ga2O3 = 8.2759e21 cm^-3
ρ_O := 0.00142897*g/cm^3  # - плотность мишени (кислород)
M_O := 15.9994*g/mol
(M_Ga/M_He)^2 - sin(θ)^2 = 303.406
K_Ga := ((cos(θ) + sqrt(|(M_Ga/M_He)^2 - sin(θ)^2|))/(1 + M_Ga/M_He))^2 = 0.796015
E_Ga := E_0*K_Ga = 1990038 eV
dσ_dΩ.Ga := K_c^2*(Z_He*Z_Ga*q^2/(4*E_Ga))^2*1/sin(θ/2)^4 = 1.27729 barn/sr  # - формула Резерфорда
Y_Ga := dσ_dΩ.Ga*Ω*Q*N_Ga^(2/3) = 3919.47
(M_O/M_He)^2 - sin(θ)^2 = 15.9479
K_O := ((cos(θ) + sqrt(|(M_O/M_He)^2 - sin(θ)^2|))/(1 + M_O/M_He))^2 = 0.362482
E_O := E_0*K_O = 906205 eV
dσ_dΩ.O := K_c^2*(Z_He*Z_O*q^2/(4*E_O))^2*4/sin(θ)^4*(sqrt(1 - (M_He/M_O*sin(θ))^2) + cos(θ))^2/sqrt(1 - (M_He/M_O*sin(θ))^2) = 0.361161 barn/sr
Y_O := dσ_dΩ.O*Ω*Q*N_O^(2/3) = 1452.22
# Толщина подложки нам не известна,поэтому разрешение страгглинга посчитать при данных условиях нельзя.
# Определим значение коэффициента энергетических потерь при обратном рассеянии.
S_Ga := K_Ga*ε_Ga(E_Ga/eV)*N_Ga + 1/|cos(θ)|*(K_Ga*ε_Ga(K_Ga*E_0/eV)*N_Ga) = 8.46018 eV/Angstrom
ΔE_Ga := t*S_Ga = 21150.4 eV
S_O := K_O*ε_O(E_0/eV)*N_O + 1/|cos(θ)|*(K_O*ε_O(K_O*E_0/eV)*N_O) = 3.97213 eV/Angstrom
ΔE_O := t*S_O = 9930.33 eV
nsO := ceil((E_O - En0)/d_n) = 162
nfO := ceil(((E_In + ΔE_O) - En0)/d_n) = 418
EhVf_O := E_In + ΔE_O/2 = 2181709 eV
YhVf_O := K_c^2*(Z_He*Z_O*q^2/(4*EhVf_O))^2*1/sin(θ/2)^4*Ω*Q*N_O^(2/3) = 284.581
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E_GaO := E_Ga*K_O = 721353 eV
E_OV := E_O*K_V = 662962 eV
E_GaV := E_Ga*K_V = 1455872 eV
E_OO := E_O*K_O = 328483 eV
dσ_dΩ.GaO := K_c^2*(Z_He*Z_Ga*q^2/(4*E_GaO))^2*1/sin(θ/2)^4 = 9.72111 barn/sr
dσ_dΩ.GaV := K_c^2*(Z_He*Z_Ga*q^2/(4*E_GaV))^2*1/sin(θ/2)^4 = 2.38652 barn/sr
dσ_dΩ.OV := K_c^2*(Z_He*Z_O*q^2/(4*E_OV))^2*1/sin(θ/2)^4*(sqrt(1 - ((M_He/M_O)^2*sin(θ))^2) + cos(θ))/sqrt(1 - ((M_He/M_O)^2*sin(θ)^2)^2) = 0.0115991 barn/sr
dσ_dΩ.OO := K_c^2*(Z_He*Z_O*q^2/(4*E_OO))^2*1/sin(θ/2)^4*(sqrt(1 - ((M_He/M_O)^2*sin(θ))^2) + cos(θ))/sqrt(1 - ((M_He/M_O)^2*sin(θ)^2)^2) = 0.0472469 barn/sr
Y_GaO := dσ_dΩ.GaO*Ω*Q*N_Ga^(2/3) = 29830
Y_GaV := dσ_dΩ.GaV*Ω*Q*N_Ga^(2/3) = 7323.24
Y_O.V := dσ_dΩ.OV*Ω*Q*N_O^(2/3) = 46.6396
Y_OO := dσ_dΩ.OO*Ω*Q*N_O^(2/3) = 189.979
nfGaO := ceil((E_GaO - En0)/d_n) = 125
EcpGaO := (E_GaO - En0)/2 = 310676 eV
nfGaV := ceil((E_GaV - En0)/d_n) = 272
EcpGaV := (E_GaV - En0)/2 = 677936 eV
EcpOV := (E_OV - En0)/2 = 281481 eV
nfOV := ceil((E_OV - En0)/d_n) = 113
EcpOO := (E_OO - En0)/2 = 114242 eV
nfOO := ceil((E_OO - En0)/d_n) = 46
E_Ga := K_Ga*E_0
E_O := K_O*E_0
Y05_GaO := K_c^2*(Z_He*Z_Ga*q^2/(4*EcpGaO))^2*1/sin(θ/2)^4*Ω*Q*N_Ga^(2/3) = 160817
Y05_GaV := K_c^2*(Z_He*Z_Ga*q^2/(4*EcpGaV))^2*1/sin(θ/2)^4*Ω*Q*N_Ga^(2/3) = 33773.2
Y05_OV := K_c^2*(Z_He*Z_O*q^2/(4*EcpOV))^2*1/sin(θ/2)^4*(sqrt(1 - ((M_He/M_O)^2*sin(θ))^2) + cos(θ))/sqrt(1 - ((M_He/M_O)^2*sin(θ)^2)^2)*Ω*Q*N_O^(2/3) = 258.722
Y05_OO := K_c^2*(Z_He*Z_O*q^2/(4*EcpOO))^2*1/sin(θ/2)^4*(sqrt(1 - ((M_He/M_O)^2*sin(θ))^2) + cos(θ))/sqrt(1 - ((M_He/M_O)^2*sin(θ)^2)^2)*Ω*Q*N_O^(2/3) = 1570.66
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YY(n) := Y_n(n, 0, nfGaO, Y05_GaO) + Y_n(n, 0, nfGaV, Y05_GaV) + Y_n(n, 0, nfOV, Y05_OV) + Y_n(n, 0, nfOO, Y05_OO) + Y_n(n, nsO, nfO, YhVf_O) + Y_n(n, n_In, n_f, YhVf_Al)
n := n_f, n_f - 0.01 .. 0
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