# Шустинский М.А.
# ЭР-05м-20
# Постоянные и размерности:
# Постоянная Кулона:
k_c := 9*10^9*m/F
# Заряд электрона
q := 1.6*10^-19*coul
# Масса электрона
m_0 := 9.1*10^-31*kg
# Число Авогадро
N_a := 6*10^23*mol^-1
# 10^15 атомов
atom := 10^15
# Атомные единицы массы в граммы
aem := 1.67*10^-24*gm
# Электрон Вольты в Джоули
eV := 1.6*10^-19*J
# Материал
# Подложка | Si3N4
# Пленка | In2O3
# Металл | In
# Данные:
# Начальная энергия частиц
E_0 := 2.5*10^6*eV
# Толщина пленки
t_f := 150 nm
# Ток частиц
I := 10^-5*A
# Время бомбардировки
t_bomb := 30 s
# Угол детектора
θ := 170*π/180 = 2.96706
# Площадь детектора
S_d := 0.1 cm^2
# Расстояние до детектора
d_td := 5 cm
# Разрешение детектора
dE := 20*10^3*eV
# Энерия нулевого канала
E_ch0 := 0.1*10^6*eV
# Ширина канала
W_ch := 5*10^3*eV
# Атомные массы элементов:
M_He := 4*aem
M_In := 114.2*aem
M_O := 16*aem
M_Si := 28*aem
M_N := 14*aem
M_HeM := 4*gm/mol
M_InM := 114.2*gm/mol
M_OM := 16*gm/mol
M_SiM := 28*gm/mol
M_NM := 14*gm/mol
# Заряды ядер элементов:
Z_He := 2
Z_In := 49
Z_O := 8
Z_Si := 14
Z_N := 7
# Плотности:
ρ_In := 7.31*gm/cm^3
ρ_In2O3 := 7.18*gm/cm^3
ρ_Si3N4 := 3.17*gm/cm^3
# Кинематический фактор
K(μ) := ((cos(θ) + sqrt(|μ^2 - sin(θ)^2|))/(1 + μ))^2
μ_In := M_In/M_He = 28.55
μ_O := M_O/M_He = 4
μ_Si := M_Si/M_He = 7
μ_N := M_N/M_He = 3.5
K_In := K(μ_In) = 0.870143
K_O := K(μ_O) = 0.362746
K_Si := K(μ_Si) = 0.564947
K_N := K(μ_N) = 0.311335
# Радиус приемника
A := sqrt(S/π) = 0.56419 A*s^(3/2)/(kg^(1/2)*m)
# Телесный угол приемника
Ω := S_d/d_td^2 = 0.004
# Колличество налетающих частиц
Q := I*t_bomb/q = 1.875e15
# Энергия частиц, рассеявшихся на металле
E_Me := K_In*E_0 = 2175357 eV
dσdΩ(Z_2, E_0, μ) := k_c^2*(Z_2*Z_He*q^2/(4*E_0))^2*1/sin(θ/2)^4
cos(θ) = -0.984808
# Поверхностная плотность атомов Индия
N_s := (N_a*ρ_In/M_InM)^(2/3) = 1.13833e19 1/m^2
# Формула Резерфорда для сечения рассеяния с учетом эффекта отдачи
# Колличество вылетающих частиц
dσdΩ(Z_2, E_0, μ) := k_c^2*(Z_2*Z_He*q^2/(4*E_0))^2*1/sin(θ/2)^4*(sqrt(1 - (1/μ*sin(θ))^2) + cos(θ))^2/sqrt(1 - (1/μ*sin(θ))^2)
dE_Me := E_0
# Выход рассеяния
Y(Z_2, E_0, N, μ) := dσdΩ(Z_2, E_0, μ)*Q*N*Ω
I
dσdΩ(Z_In, E_0, μ_In) = 4.6558e-32 m^2
H(Z_2, E, E_0, N, μ) := Y(Z_2, E_0, N, μ)/(sqrt(4*π)*dE)*exp(-(E*eV - E_0)^2/(2*dE^2))
Y(Z_In, E_0, N_s, μ_In) = 3.97488
# Сечение торможения
ε(Z_2, I, E) := k_c^2*2*π*Z_He^2*q^4/(E*eV)*Z_2*M_He/m_0*ln(4*m_0*E*eV/(M_He*I))
# Средняя энергия возбуждения электрона
coul^2/J = 1 F
k_c^2*(Z_In*Z_He*q^2/(4*E_0))^2 = 1.99149e-28 m^2
I_In := 12*eV*Z_In = 588 eV
I_O := 12*eV*Z_O = 96 eV
k_c^2 = 8.1e19 m^2/F^2
E_0 = 4e-13 J
I_Si := 12*eV*Z_Si = 168 eV
I_N := 12*eV*Z_N = 84 eV
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Z_In*Z_He*q^2/(4*E_0) = 1.568e-24 F
m^2*coul^4/(F^2*eV^2) = 3.90625e37 m^2
coul = 1 C
(E_0 - E_Me)^2 = 1.05393e11 eV^2
2*dE^2 = 800000000 eV^2
exp(-(E_0 - E_Me)^2/(2*dE^2)) = 6.09959e-58
ε(Z_2, I, E) := k_c^2*2*π*Z_He^2*q^4/E*Z_2*M_He/m_0*ln(4*m_0*E/(M_He*I))
# Плотность атомов в веществе
N(ρ, M) := N_a*ρ/M
# Скорость потери энергии частицы
dEdx(ε, ρ, M) := ε*N(ρ, M)
# Сечение торможения пленки
ε_f := (ε(Z_In, I_In, E_0)*2 + ε(Z_O, I_O, E_0)*3)/5 = 44.6829 eV*cm^2/atom
# Молярная масса In2O3
M_In2O3 := 2*M_InM + 3*M_OM = 276.4 gm/mol
# Молярная масса Si3N4
M_Si3N4 := 2*M_SiM + 4*M_NM = 112 gm/mol
# Коэффициент энергетических потерь обратного рассеяния
S_loss(K, dEdx_in, dEdx_out) := K*dEdx_in + 1/|cos(θ)|*dEdx_out
# Ширина спектра
ΔΕ(t, S_loss) := t*S_loss
# Скорость потери энергии в пленке
dEdx_f := dEdx(ε_f, ρ_In2O3, M_In2O3) = 6.96433 eV/Angstrom
# Сечение торможения подложки
ε_b := (ε(Z_Si, I_Si, E_0 - dEdx_f*t_f)*3 + ε(Z_N, I_N, E_0 - dEdx_f*t_f)*4)/7 = 36.3577 eV*cm^2/atom
# Скорость потери энергии в подложке
dEdx_b := dEdx(ε_b, ρ_Si3N4, M_Si3N4) = 6.17432 eV/Angstrom
# Коэффициент энергетических потерь In и O
# Поверхностная плотность атомов пленки
N_sIn2O3 := (N_a*ρ_In2O3/M_In2O3)^(2/3) = 6.23962e18 1/m^2
S_In := S_loss(K_In, dEdx_f, K_In*dEdx_f) = 12.2134 eV/Angstrom
S_O := S_loss(K_O, dEdx_f, K_O*dEdx_f) = 5.09154 eV/Angstrom
# Ширина спектра In и O
# Объемная плотность атомов пленки
N_In2O3 := (N_a*ρ_In2O3/M_In2O3)*t_f = 2.33792e17 1/cm^2
ΔE_In := ΔΕ(t_f, S_In) = 18320.1 eV
ΔE_O := ΔΕ(t_f, S_O) = 7637.31 eV
# Энергия, которую будет иметь частица отразившись от поверхности подложки
# Поверхностная плотность атомов подложки
N_sSi3N4 := (N_a*ρ_Si3N4/M_Si3N4)^(2/3) = 6.60686e18 1/m^2
ε_foutSi := ε(Z_In, I_In, K_Si*(E_0 - dEdx_f*t_f))*2 + ε(Z_O, I_O, K_Si*(E_0 - dEdx_f*t_f))*3 = 206.242 eV*cm^2/atom
ε_foutN := ε(Z_In, I_In, K_N*(E_0 - dEdx_f*t_f))*2 + ε(Z_O, I_O, K_N*(E_0 - dEdx_f*t_f))*3 = 15.4419 eV*cm^2/atom
dEdx_foutSi := dEdx(ε_foutSi, ρ_In2O3, M_In2O3)
dEdx_foutN := dEdx(ε_foutN, ρ_In2O3, M_In2O3)
E_1Si := K_Si*(E_0 - dEdx_f*t_f) - t_f/|cos(θ)|*dEdx_foutSi = 1357505 eV
E_1N := K_N*(E_0 - dEdx_f*t_f) - t_f/|cos(θ)|*dEdx_foutN = 771419 eV
t_bulkMax := E_ch0 - K_Si*(E_0 - dEdx_f*t_f - □)  # error: Пустой местозаполнитель.
E_ch0
ε_foutSif := ε(Z_In, I_In, K_Si*(E_0 - dEdx_f*t_f))*2 + ε(Z_O, I_O, K_Si*(E_0 - dEdx_f*t_f))*3 = 206.242 eV*cm^2/atom
ε_foutSib == ε(Z_Si, I_Si, K_Si*(E_0 - dEdx_f*t_f - t_b/□))*3 + ε(Z_N, I_N, K_Si*(E_0 - dEdx_f*t_f - dEdx_b*t_b))*4
ε_foutNb == ε(Z_Si, I_Si, K_N*(E_0 - dEdx_f*t_f))*3 + ε(Z_N, I_N, K_N*(E_0 - dEdx_f*t_f))*4
N_vIn2O3 := (N_a*ρ_In2O3/M_In2O3) = 1.55861e24 1/(cm^2*m)
N_Si3N4 := (N_a*ρ_Si3N4/M_Si3N4) = 1.69821e22 1/cm^3
K_Si(E_0 - dEdx_f*t_f - dEdx_b*t_b) - t_f/|cos(θ)|*dEdx_foutSi - t_b/|cos(θ)|*dEdx_foutSib == E_ch0
H_Me(E) := H(Z_In, E, E_Me, N_s, μ_In)
K_Si*(E_0 - dEdx_f*t_f - dEdx_b*t_b) - t_b/|cos(θ)|*dEdx_outSib - t_f/|cos(θ)|*dEdx_foutSib == E_ch0*10
H_In(E) := H(Z_In, E, K_In*E_0, N_sIn2O3, μ_In)
t_bFind := Find(t_b)
H_In1(E) := H(Z_In, E, K_In*E_0 - ΔE_In, N_In2O3, μ_In)
dEdx_foutSib := □  # error: Пустой местозаполнитель.
H_O(E) := H(Z_O, E, K_O*E_0, N_sIn2O3, μ_O)
dEdx_outSib =  # error: Эта переменная не определена.
H_O(8.92*10^5) = 2.60547e13 1/J
(ε(Z_Si, I_Si, K_Si*(E_0 - dEdx_f*t_f - dEdx_b*t_b))*3 + ε(Z_N, I_N, K_Si*(E_0 - dEdx_f*t_f - dEdx_b*t_b))*4) = eV*cm^2/atom
H_O1(E) := H(Z_O, E, K_O*E_0 - ΔE_O, N_sIn2O3, μ_O)
dEdx_outSib(t_b) := (ε(Z_Si, I_Si, K_Si*(E_0 - dEdx_f*t_f - dEdx_b*t_b))*3 + ε(Z_N, I_N, K_Si*(E_0 - dEdx_f*t_f - dEdx_b*t_b))*4)*N_Si3N4
K_O*E_0 = 906866 eV
H_O1(8.92*10^5) = 3.27217e13 1/J
K_Si*(E_0 - dEdx_f*t_f - dEdx_b*t_b) - t_b/|cos(θ)|*dEdx_outSib - t_f/|cos(θ)|*dEdx_foutSib = eV
dEdx_foutSib(t_b) := (ε(Z_In, I_In, K_Si*(E_0 - dEdx_f*t_f - dEdx_b*t_b) - t_b*dEdx_outSib(t_b))*2 + ε(Z_O, I_O, K_Si*(E_0 - dEdx_f*t_f - dEdx_b*t_b) - t_b*dEdx_outSib(t_b))*3)*N_vIn2O3
H_Si(E) := H(Z_Si, E, E_1Si, N_sIn2O3, μ_Si)
E_Si(t_b) := (K_Si*(E_0 - dEdx_f*t_f - dEdx_b*t_b) - t_b*dEdx_outSib(t_b) - t_f/|cos(θ)|*dEdx_foutSib(t_b))
E_ch0 = 100000 eV
H_Si1(E) := H(Z_Si, E, E_ch0, N_sIn2O3, μ_Si)
H_N(E) := H(Z_N, E, E_1N, N_sSi3N4, μ_N)
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dEdx_outNb(t_b) := (ε(Z_Si, I_Si, K_N*(E_0 - dEdx_f*t_f - dEdx_b*t_b))*3 + ε(Z_N, I_N, K_N*(E_0 - dEdx_f*t_f - dEdx_b*t_b))*4)*N_Si3N4
H_N1(E) := H(Z_N, E, E_ch0, N_sSi3N4, μ_N)
dEdx_foutNb(t_b) := (ε(Z_In, I_In, K_N*(E_0 - dEdx_f*t_f - dEdx_b*t_b) - t_b*dEdx_outSib(t_b))*2 + ε(Z_O, I_O, K_N*(E_0 - dEdx_f*t_f - dEdx_b*t_b) - t_b*dEdx_outSib(t_b))*3)*N_vIn2O3
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E_N(t_b) := (K_N*(E_0 - dEdx_f*t_f - dEdx_b*t_b) - t_b*dEdx_outNb(t_b) - t_f/|cos(θ)|*dEdx_foutNb(t_b))
E_Sis(t_b) := t_f/|cos(θ)|*dEdx_foutSib(t_b)
E_N(-1*10^-6*cm) = 777581 eV
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K_N*(E_0 - dEdx_f*t_f) = 775084 eV
ORIGIN := 0
N_In2O3 = 2.33792e21 1/m^2
E :=
    E[0] ← 0.1*10^6
    i ← 1
    E[i] ← 0.1*10^6 + i*5*10^3
    while i < 580
        i ← i + 1
        E[i] ← 0.1*10^6 + i*5*10^3
    E
Y_Me := Y(Z_In, E_Me, N_s, μ_In) = 5.2498
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Y_In1 := Y(Z_In, K_In*E_0 - ΔE_In, N_In2O3, μ_In) = 1096.6
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Y_O := Y(Z_O, K_O*E_0, N_In2O3, μ_O) = 145.976
N_In2O3 = 2.33792e21 1/m^2
E_1Si = 2.17201e-13 J
Y_O1 := Y(Z_O, K_O*E_0 - ΔE_O, N_In2O3, μ_O) = 148.466
Y_Si := Y(Z_Si, E_1Si, N_sSi3N4, μ_Si) = 0.614781
Y_Si1 := Y(Z_Si, E_ch0, N_sSi3N4, μ_Si) = 113.293
Y_N := Y(Z_N, E_1N, N_sSi3N4, μ_N) = 0.419094
E = [
    100000; 105000; 110000; 115000; 120000; 125000; 130000; 135000; 140000; 145000
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]
Y_N1 := Y(Z_N, E_ch0, N_sSi3N4, μ_N) = 24.9397
Y_O :=
    i ← 0
    while i < 580
        i ← i + 1
        (Y_O[i] ← Y(Z_O, E[i]*(J*(1.6*10^-19)), N_In2O3, μ_O)) if (E[i]*(J*(1.6*10^-19)) < K_O*E_0) and (E[i]*(J*(1.6*10^-19)) > (K_O*E_0 - ΔE_O))
        Y_O[i] ← 0.01 otherwise
    Y_O
H_O(K_O*E_0) =  # error: Значение имеет единицы измерения: энергия, а должно иметь единицы измерения: Unitless.
H_O(K_O*E_0 - ΔE_O) =  # error
M := [1/(K_O*E_0), 1; 1/(K_O*E_0 - ΔE_O), 1]  # error: Формы этих значений должны совпадать. Это значение имеет форму: энергия^-1, а другие имеют форму: Unitless.
b := [H_O(K_O*E_0); H_O1(K_O*E_0 - ΔE_O)]  # error: Значение имеет единицы измерения: энергия, а должно иметь единицы измерения: Unitless.
Y_N :=
    i ← 0
    while i < 580
        i ← i + 1
        (Y_N[i] ← Y(Z_N, E[i]*(J*(1.6*10^-19)), N_sSi3N4, μ_N)) if (E[i]*(J*(1.6*10^-19)) < E_1N)
        Y_N[i] ← 0.01 otherwise
    Y_N
A := lsolve(M, b) = 1/eV
Y_N = [
    0; 22.6211; 20.6113; 18.858; 17.3193; 15.9614; 14.7572; 13.6843; 12.7243; 11.8619
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]
H_O(E1) := A[0]/E1 + A[1]
Y_Si :=
    i ← 0
    while i < 580
        i ← i + 1
        (Y_Si[i] ← Y(Z_Si, E[i]*(J*(1.6*10^-19)), N_sSi3N4, μ_Si)) if (E[i]*(J*(1.6*10^-19)) < E_1Si)
        Y_Si[i] ← 0.01 otherwise
    Y_Si
H_Och :=
    i ← 0
    while i < 580
        i ← i + 1
        (H_Och[i] ← H_O(E[i])) if (E[i] < K_O*E_0) and (E[i] > (K_O*E_0 - ΔE_O))
        H_Och[i] ← 10*1/J otherwise
    H_Och
Y_In :=
    i ← 0
    while i < 580
        i ← i + 1
        (Y_In[i] ← Y(Z_O, E[i]*(J*(1.6*10^-19)), N_In2O3, μ_In)) if (E[i]*(J*(1.6*10^-19)) < E_Me) and (E[i]*(J*(1.6*10^-19)) > (K_In*E_0 - ΔE_In))
        Y_In[i] ← 0.01 otherwise
    Y_In
M := [1/(K_In*E_0), 1; 1/(K_In*E_0 - ΔE_In), 1]  # error: Формы этих значений должны совпадать. Это значение имеет форму: энергия^-1, а другие имеют форму: Unitless.
b := [H_In(K_In*E_0); H_In1(K_In*E_0 - ΔE_In)]  # error: Значение имеет единицы измерения: энергия, а должно иметь единицы измерения: Unitless.
A := lsolve(M, b) = 1/eV
E_0 := 2.5*10^6
ΔE_O := 3.819*10^4
ΔE_In := 9.16*10^4
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H_In(E1) := A[0]/E1 + A[1]
H_Inch :=
    i ← 0
    while i < 580
        i ← i + 1
        (H_Inch[i] ← H_In(E[i])) if (E[i] < K_In*E_0) and (E[i] > (K_In*E_0 - ΔE_In))
        H_Inch[i] ← 10*1/J otherwise
    H_Inch
K_In*E_0 = 2175357
Y := Y_O + Y_N + Y_Si + Y_In
K_In*E_0 - ΔE_In = 2083757
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H_Inch =  # error
