# Title: TR
# Description: TR
# Национальный исследовательский университет "МЭИ"
# кафедра
# Электроники и наноэлектроники
# Типовой расчёт по курсу:
# "Современные методы исследования полупроводников"
# Вариант №8
# Студент: Маринин Н. С.
# Группа: ЭР-05м-21
# Преподаватель: Баринов АД
# Москва 2019
# Ионы с энергией 2,5 МэВ бомбардируют поверхность пленки толщиной t, напыленной на подложку и сверху покрытой тонким слоем металла
#
# 1. Постройте кривые зависимости сечения торможения от энергии иона для каждого из элементов пленки и подложки, а также для материала самой пленки и подложки в диапазоне энергий от 0,5 до 3 МэВ
# 2. Постройте спектр обратного рассеяния, укажите особенности спектра (начало, конец, высоту и ширину)
# Ток пучка ионов равен 10мкА, длительность бомбардировки - 30 сек.
# Угол рассеяния составляет 170 (градусов). площадь приемного окна детектора составляет 0,1 см^2, расстояние от мишени до детектора- 5 см. Разрешение детектора принять равным 20 кэВ. Энергия нулевого канала - 0,1 МэВ, ширина канала- 5 кэВ.
# Материаллы:
# Подложка Ga_2O_3
# Пленка VO_2
# Толщиа пленки 250 нм
# Металл In
# Ион ^4He^+
# Размерноти в расчете
# Постоянная Кулона
k_c := 9*10^9*m/F
# Заряд электрона
q := 1.6*10^-19*coul
# Масса электрона
m_0 := 9.1*10^-31*kg
# Число Авогадро
N_a := 6*10^23*mol^-1
# 10^15 атомов
atom := 10^15
# Размерноти в расчетей
# Атомные единицы массы в граммы
aem := 1.67*10^-24*gm
# Электрон Вольты в Джоули
eV := 1.6*10^-19*J
# Дано:
# Начальная энергия частиц
E_0 := 2.5*10^6*eV
# Толщина пленки
t_f := 250 nm
# Ток частиц
I := 10*10^-6*A
# Время бомбардировки
t_bomb := 30 s
# Угол детектора
θ := 170*π/180
# Площадь детектора
S_d := 0.1 cm^2
# Расстояние до детектора
d_td := 5 cm
# Разрешение детектора
dE := 20*10^3*eV
# Энерия нулевого канала
E_ch0 := 0.1*10^6*eV
# Ширина канала
W_ch := 5*10^3*eV
# Атомные массы элементов:
M_He := 4*aem
M_Ga := 69.723*aem
M_O := 15.999*aem
M_V := 50.942*aem
M_In := 114.820*aem
M_HeM := 4*gm/mol
M_GaM := 69.723*gm/mol
M_OM := 15.999*gm/mol
M_VM := 50.942*gm/mol
M_InM := 114.820*gm/mol
# Молярная масса VO2  :
M_VO2M := M_VM + 2*M_OM = 82.94 gm/mol
# Молярная масса Ga2O3:
M_Ga2O3M := 2*M_GaM + 3*M_OM = 187.443 gm/mol
# Заряды ядер элементов:
Z_He := 2
Z_Ga := 31
Z_O := 8
Z_V := 23
Z_In := 49
# Плотности:
ρ_In := 7.31*gm/cm^3
ρ_Ga2O3 := 6.44*gm/cm^3
ρ_VO2 := 4.34*gm/cm^3
# Первый пункт
# Построить кривые зависимости сечения торможения от энергии иона для каждого из элементов плёнки и подложки, а также для материала само  плёнки и подложки на одном графике в диапазоне энергий от 0.5 МэВ до 3 МэВ.
# Для определения сечения торможения нужно знать порядковый номер и энергию ионизации атомов мишения.
# Сечение торможения
ε(Z, I, E) := k_c^2*2*π*Z_He^2*q^4/(E*eV)*Z*M_He/m_0*ln(4*m_0*E*eV/(M_He*I))
# Средняя энергия возбуждения электрона
I_In := 10*eV*Z_In = 490 eV
I_V := 11*eV*Z_V = 253 eV
I_O := 12*eV*Z_O = 96 eV
I_Ga := 11*eV*Z_Ga = 341 eV
I_Ga2O3 := 10*eV*(2*Z_Ga + 3*Z_O) = 860 eV
I_VO2 := 10*eV*(Z_V + 2*Z_O) = 390 eV
# Составной материал
ε_Ga2O3(E) := 2*ε(Z_Ga, I_Ga, E) + 3*ε(Z_O, I_O, E)
ε_VO2(E) := ε(Z_V, I_V, E) + 2*ε(Z_O, I_O, E)
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# Второй Пункт
# Кинематический фактор:
K(μ) := ((cos(θ) + sqrt(|μ^2 - sin(θ)^2|))/(1 + μ))^2
μ_Ga := M_Ga/M_He = 17.4307
K_Ga := K(μ_Ga) = 0.796133
μ_V := M_V/M_He = 12.7355
K_V := K(μ_V) = 0.731729
μ_O := M_O/M_He = 3.99975
K_O := K(μ_O) = 0.362722
μ_In := M_In/M_He = 28.705
K_In := K(μ_In) = 0.870797
# Телесный угол приемника:
Ω := S_d/d_td^2 = 0.004
# Колличество налетающих частиц:
Q := I*t_bomb/q = 1.875e15
# Формула Резерфорда для сечения рассеяния без учета эффекта отдачи (для тяжёлых атомов)
dσdΩ_H(Z, E_0, μ) := k_c^2*(Z*Z_He*q^2/(4*E_0))^2*1/sin(θ/2)^4
# Формула Резерфорда для сечения рассеяния с учетом эффекта отдачи (для лёгких атомов)
dσdΩ_L(Z, E_0, μ) := k_c^2*(Z*Z_He*q^2/(4*E_0))^2*4/sin(θ)^4*(sqrt(1 - (1/μ*sin(θ))^2) + cos(θ))^2/sqrt(1 - (1/μ*sin(θ))^2)
# Выход рассеяния
Y(dσdΩ, N) := dσdΩ*Q*N*Ω
Высота
H(dσdΩ, E, E_0, N_s, μ) := Y(dσdΩ, N_s)/sqrt(4*π*(dE/W_ch)^2)*exp(-(E_0 - E)^2/(2*dE^2))
ε(Z, I, E) := k_c^2*2*π*Z_He^2*q^4/E*Z*M_He/m_0*ln(4*m_0*E/(M_He*I))
# Плотность атомов в веществе
N(ρ, M) := N_a*ρ/M
# Плотность атомов на поверхности
N_S(N) := N^(2/3)
# Скорость потери энергии частицы
dEdx(ε, N) := ε*N
# Коэффициент энергетических потерь обратного рассеяния
S_loss(K, dEdx_in, dEdx_out) := K*dEdx_in + 1/|cos(θ)|*dEdx_out
# где dEdx(in)-скорость потери энергии при входе, а dEdx(out) - скорость потерь энергии при выходе
# Ширина спектра
ΔE(t, S_loss) := t*S_loss
# Металл
# Плотность атомов в веществе и на поверхности
N_In := N(ρ_In, M_InM) = 3.81989e22 1/cm^3
N_s.In := N_S(N_In) = 1.13423e15 1/cm^2
# Кинематический фактор
K_In := K(μ_In) = 0.870797
# Выходная энергия
E_In := E_0*K_In = 2176992 eV
# Формула Резерфорда для сечения рассеяния (с учетом эффекта отдачи)
dσdΩ_In := dσdΩ_H(Z_In, E_In, μ_In) = 2.66665 barn/sr
# Выход рассеяния
Y_In := Y(dσdΩ_In, N_s.In) = 22684.5
# Не имея данных о толщине пленки металла, рассчитать разрешение страгглинга нельзя, поэтому примем предел разрешения равным разрешению детектора.
dE_In := dE = 20000 eV
# Зная выход рассеяния и предел разрешения, сможем посчитать высоту спектра
H(dσdΩ, E, E_0, N_s, μ) := Y(dσdΩ, N_s)/sqrt(4*π*(dE/W_ch)^2)*exp(-(E_0 - E)^2/(2*dE^2))
H_In := H(dσdΩ_In, E_In, E_0, N_s.In, μ_In) = 3.6687e-54
H(Z_2, E, E_0, N, μ) := Y(Z_2, E_0, N, μ)/(sqrt(4*π)*dE)*exp(-(E*eV - E_0)^2/(2*dE^2))  # error: Эта функция допускает не более 2 аргументов, но применяется она к 4.
# Тонкая плёнка
# Плотность атомов в веществе и на поверхности
N_VO2 := N(ρ_VO2, M_VO2M) = 3.13962e22 1/cm^3
N_s.VO2 := N_S(N_VO2) = 9.95217e14 1/cm^2
N_V := 1/3*N_VO2 = 1.04654e22 1/cm^3
N_O := 2/3*N_VO2 = 2.09308e22 1/cm^3
# Кинематический фактор
K_V = 0.731729
K_O = 0.362722
# Выходная энергия
E_V1 := E_0*K_V = 1829323 eV
E_O1 := E_0*K_O = 906806 eV
# Сечение торможения
ε_V.0 := ε(Z_V, I_V, E_0) = 59.2525 eV*cm^2/atom
ε_O.0 := ε(Z_O, I_O, E_0) = 32.4725 eV*cm^2/atom
ε_VO2.0 := ε_V.0 + ε_O.0 = 91.725 eV*cm^2/atom
ε_V.1 := ε(Z_V, I_V, E_V1) = 65.9525 eV*cm^2/atom
ε_O.1 := ε(Z_O, I_O, E_O1) = 55.2978 eV*cm^2/atom
ε_VO2.1 := ε_V.1 + ε_O.1 = 121.25 eV*cm^2/atom
# Скорость потери энергии частицы
dEdx_VO2.0 := dEdx(ε_VO2.0, N_VO2) = 28.7982 eV/Angstrom
dEdx_VO2.1 := dEdx(ε_VO2.1, N_VO2) = 38.068 eV/Angstrom
# Коэффициент энергетических потерь обратного рассеяния
S_loss.V := S_loss(K_V, dEdx_VO2.0, dEdx_VO2.1) = 59.7277 eV/Angstrom
S_loss.O := S_loss(K_O, dEdx_VO2.0, dEdx_VO2.1) = 49.1009 eV/Angstrom
# Ширина спектра
ΔE_V := ΔE(t_f, S_loss.V) = 149319 eV
ΔE_O := ΔE(t_f, S_loss.O) = 122752 eV
# Левая граница спектра
E_V2 := E_V1 - ΔE_V = 1680004 eV
E_O2 := E_O1 - ΔE_O = 784053 eV
# Потеря энергии в плёнке
E_loss.VO2 := dEdx_VO2.0*t_f = 71995.4 eV
# Формула Резерфорда для сечения рассеяния (с учетом эффекта отдачи)
dσdΩ_V := dσdΩ_H(Z_V, E_V1, μ_V) = 0.832076 barn/sr
dσdΩ_O := dσdΩ_L(Z_O, E_O1, μ_O) = 0.360742 barn/sr
# Выход рассеяния
Y_V := Y(dσdΩ_V, N_V)*t_f = 1632751
Y_O := Y(dσdΩ_O, N_O)*t_f = 1415742
# Разрешение страгглинга с примененнием формулы Бора для двух компонентов пленки
dE_s.V := 2.35*sqrt(4*π*k_c^2*Z_He^2*q^4*N_V*Z_V*t_f) = 5885.41 eV
dE_V := sqrt(dE_s.V^2 + dE^2) = 20848 eV
dE_s.O := 2.35*sqrt(4*π*k_c^2*Z_He^2*q^4*N_O*Z_O*t_f) = 4908.77 eV
dE_O := sqrt(dE_s.O^2 + dE^2) = 20593.6 eV
# Подложка
# Плотность атомов в веществе и на поверхности
N_Ga2O3 := N(ρ_Ga2O3, M_Ga2O3M) = 2.06143e22 1/cm^3
N_s.Ga2O3 := N_S(N_Ga2O3) = 7.51817e14 1/cm^2
N_Ga := 2/5*N_Ga2O3 = 8.24571e21 1/cm^3
N_O.sub := 3/5*N_Ga2O3 = 1.23686e22 1/cm^3
# Кинематический фактор
K_Ga = 0.796133
K_O = 0.362722
# Выходная энергия
# До подложки будет доходить частично рассеяная на плёнке энергия
ε_temp(Z, I, E) := ε(Z, I, E) + ε(Z, I, E)
ε_VO2.0.Ga := ε_temp(Z_V, I_V, (E_0 - E_loss.VO2)*K_Ga) = 129.849 eV*cm^2/atom
ε_VO2.0.O := ε_temp(Z_V, I_V, (E_0 - E_loss.VO2)*K_O) = 127.92 eV*cm^2/atom
dEdx_Ga := dEdx(ε_VO2.0.Ga, N_VO2) = 4.07675e9 eV/cm
dEdx_O := dEdx(ε_VO2.0.O, N_VO2) = 4.0162e9 eV/cm
E_Ga1 := K_Ga*(E_0 - E_loss.VO2) - 1/|cos(θ)|*dEdx_Ga*t_f = 1829524 eV
E_O1.sub := K_O*(E_0 - E_loss.VO2) - 1/|cos(θ)|*dEdx_O*t_f = 778738 eV
E_0.los := E_0 - E_loss.VO2
# Сечение торможения
ε_Ga.0 := ε(Z_Ga, I_Ga, E_0.los) = 66.2232 eV*cm^2/atom
ε_O.0.sub := ε(Z_O, I_O, E_0.los) = 33.067 eV*cm^2/atom
ε_Ga2O3.0 := ε_Ga.0 + ε_O.0.sub = 99.2903 eV*cm^2/atom
ε_Ga.1 := ε(Z_Ga, I_Ga, E_Ga1) = 69.5408 eV*cm^2/atom
ε_O.1.sub := ε(Z_O, I_O, E_O1.sub) = 58.4082 eV*cm^2/atom
ε_Ga2O3.1 := ε_Ga.1 + ε_O.1.sub = 127.949 eV*cm^2/atom
# Скорость потери энергии частицы
dEdx_Ga2O3.0 := dEdx(ε_Ga2O3.0, N_Ga2O3) = 2.0468e9 eV/cm
dEdx_Ga2O3.1 := dEdx(ε_Ga2O3.1, N_Ga2O3) = 2.63758e9 eV/cm
# Коэффициент энергетических потерь обратного рассеяния
S_loss.Ga := S_loss(K_V, dEdx_Ga2O3.0, dEdx_Ga2O3.1) = 41.7596 eV/Angstrom
S_loss.O.sub := S_loss(K_O, dEdx_Ga2O3.0, dEdx_Ga2O3.1) = 34.2068 eV/Angstrom
# Ширина спектра
ΔE_Ga := ΔE(t_f, S_loss.Ga) = 104399 eV
ΔE_O.sub := ΔE(t_f, S_loss.O.sub) = 85517.1 eV
# Левая граница спектра
E_Ga2 := E_Ga1 - ΔE_Ga = 1725125 eV
E_O2.sub := E_O1.sub - ΔE_O.sub = 693220 eV
# Формула Резерфорда для сечения рассеяния (с учетом эффекта отдачи)
dσdΩ_Ga := dσdΩ_H(Z_Ga, E_Ga1, μ_V) = 1.51125 barn/sr
dσdΩ_O.sub := dσdΩ_L(Z_O, E_O1.sub, μ_O) = 0.489152 barn/sr
# Выход рассеяния
Y_Ga := Y(dσdΩ_Ga, N_S(N_Ga)) = 4626.1
Y_O.sub := Y(dσdΩ_O.sub, N_S(N_O.sub)) = 1962.08
# Не имея данных о толщине пленки металла, рассчитать разрешение страгглинга нельзя, поэтому примем предел разрешения равным разрешению детектора.
dE_Ge := dE = 20000 eV
# Построение графиков
# Энерия нулевого канала
E_ch0 = 100000 eV
# Ширина канала
W_ch = 5000 eV
# Во всех случаях предел разрешения приймем равным разрешению детектора. Так как в единственном случае учёта страгглина результат мало отличается от разрешения детектора.
# Полное число каналов
n(E) := ceil((E - E_ch0)/W_ch)
n_In := n(E_In) = 416
σ := dE/W_ch = 4  # Дисперсия
μ := n_In = 416  # Математическое ожидание
n_V1 := n(E_V1) = 346
n_O1 := n(E_O1) = 162
n_V2 := n(E_V2) = 317
n_O2 := n(E_O2) = 137
Δn_V := n_V1 - n_V2 = 29
Δn_O := n_O1 - n_O2 = 25
n_Ga1 := n(E_Ga1) = 346
n_O1.sub := n(E_O1.sub) = 136
n_Ga2 := 0
n_O2.sub := 0
Δn_Ga := n_Ga1 - n_Ga2 = 346
Δn_O2.sub := n_O1.sub - n_O2.sub = 136
n_V := n_V2 .. n_V1
n_O := n_O2 .. n_O1
n_Ga := n_Ga2 .. n_Ga1
n_O.sub := n_O2.sub .. n_O1.sub
# Распределение Гаусса
f_Gauss(n, μ, σ) := 1/(σ*sqrt(2*π))*exp(-1/2*((n - μ)/σ)^2)
# Функция для построения спектра
Y_n(n, n_2, n_1, Y) :=
    n_0 ← n_2 + ((n_1 - n_2)/2)
    Y_n ← Y*f_Gauss(n, n, σ)*(n_0/n)^2 if n_2 < n < n_1
    Y_n ← Y*f_Gauss(n, n_2, σ) if n ≤ n_2
    Y_n ← Y*(n_0/n_1)^2*f_Gauss(n, n_1, σ) if n ≥ n_1
    Y_n ← 0 otherwise
    Y_n
# Средний выход рассеяния
E_av(E_2, ΔE) := E_2 + ΔE/2
E_V.av := E_av(E_V2, ΔE_V) = 1754664 eV
E_O.av := E_av(E_O2, ΔE_O) = 845430 eV
E_Ga.av := E_av(E_Ga2, ΔE_Ga) = 1777325 eV
E_O.sub.av := E_av(E_O2.sub, ΔE_O.sub) = 735979 eV
dσdΩ_V.av := dσdΩ_H(Z_V, E_V.av, μ_V) = 0.904391 barn/sr
dσdΩ_O.av := dσdΩ_L(Z_O, E_O.av, μ_O) = 0.415022 barn/sr
dσdΩ_Ga.av := dσdΩ_H(Z_Ga, E_Ga.av, μ_Ga) = 1.60132 barn/sr
dσdΩ_O.sub.av := dσdΩ_L(Z_O, E_O.sub.av, μ_O) = 0.54764 barn/sr
Y_V.av := Y(dσdΩ_V.av, N_V)*t_f = 1774651
Y_O.av := Y(dσdΩ_O.av, N_O)*t_f = 1628763
Y_Ga.av := Y(dσdΩ_Ga.av, N_S(N_Ga)) = 4901.82
Y_O.sub.av := Y(dσdΩ_O.sub.av, N_S(N_O.sub)) = 2196.69
# Полный спектр
n := 0, 1 .. 500
Y_All.1(n) := Y_In*f_Gauss(n, μ, σ)
Y_All.2(n) := Y_n(n, n_V2, n_V1, Y_V.av) + Y_n(n, n_O2, n_O1, Y_O.av)
Y_All.3(n) := Y_n(n, n_Ga2, n_Ga1, Y_Ga.av) + Y_n(n, n_O2.sub, n_O1.sub, Y_O.sub.av)
Y_All(n) := Y_All.1(n) + Y_All.2(n) + Y_All.3(n)
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# Как видно можно заметить спектр от атомов кислорода VO2 (первый пик) и атомов ванадия (второй пик), метала - индия (третий) и спектр от Ga2O3 подложки.
n(E) := ceil((E - E_ch0)/W_ch)
Y_all(Z, E, μ, N) := Y(dσdΩ_H(Z, E, μ), N_S(N))
Y_n2(n, Z, μ, N) :=
    E ← n*W_ch + E_ch0
    Y_n ← Y_all(Z, E, μ, N)*f_Gauss(n, n, σ)
    Y_n
n := 0, 1 .. 500
Y_All.1(n) := Y_n2(n, Z_In, μ_In, N_In)
Y_All.2(n) := Y_n2(n, Z_Ga, μ_Ga, N_Ga) + Y_n2(n, Z_O, μ_O, N_O)
Y_All.3(n) := Y_n2(n, Z_V, μ_V, N_V) + Y_n2(n, Z_O, μ_O, N_O)
Y_All(n) := Y_All.1(n) + Y_All.2(n) + Y_All.3(n)
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